// COMSOL Multiphysics 5.5.0.306 model "beam.mph"
// Outline of the model tree

Parameters
  L = 1  // Length
  A = 0.1  // X-Section Area
  I = 8.33333333333e-06  // 2nd Moment Area
  F = -10000  // Force
  xF = 0.25  // x of Force
  Young = 210000000000  // Young's mod
  Poisson = 0.285  // Poisson's ratio
  Rho = 7800  // density

Geometry
  geom1 "Geometry 1" (2D, length unit m)
    ls1: LineSegment | specify1 = coord; specify2 = coord; coord2 = {L, 0}
    pt1: Point | p = {xF, 0}
    fin: Finalize "Form Union"

Physics
  beam: HermitianBeam on all boundaries
    dependent variable u = {u, v, w}
    emm1: Elastic "Linear Elastic Material 1" (default)
      E_mat = userdef
      E = Young
      nu_mat = userdef
      nu = 0
      rho_mat = userdef
      rho = Rho
    csd1: CrossSectionBeam "Cross Section Data 1" (default) | area = A; Izz = I
    free1: Free (default)
    init1: init "Initial Values 1" (default)
    pdr1: DispRot0 "Prescribed Displacement/Rotation 1" on points 1 | Direction = {1, 1, 0}
    pdr2: DispRot0 "Prescribed Displacement/Rotation 2" on points 3 | Direction = {0, 1, 0}
    pl1: PointLoad on points 2 | Fp = {0, F, 0}

Mesh
  mesh1 "Mesh 1"
    size: MeshSizeDefault | hmax = 0.125; custom = on
    auto_f1: Edge on remaining entities

Studies
  std1 "Study 1"
    stat: Stationary

Solver configurations
  sol1 "Solution 1" (study std1)
    v1: Variables "Dependent Variables 1"
    s1: Stationary "Stationary Solver 1"
      dDef: Direct
      fc1: FullyCoupled

Datasets
  dset1: Solution | solution = sol1

Plots
  pg1: PlotGroup2D "Stress (beam)" | data = dset1
    line1: Line | expr = beam.mises; linetype = tube; radiusexpr = beam.re
      def: Deform "Deformation" | expr = {u, v}; descr = Displacement field
  pg5: PlotGroup2D "Point Loads (beam)" | data = dset1; typeintitle = off; descriptionintitle = off; unitintitle = off
    arpt1: ArrowPoint "Point Load 1" | expr = {beam.pl1.F_Px, beam.pl1.F_Py}
      col: Color "Color Expression" | expr = comp1.beam.pl1.F_P_Mag
      def: Deform "Deformation" | expr = {u, v}; descr = Displacement field
  pg2: PlotGroup2D "Moment (beam)" | data = dset1
    line1: Line | expr = beam.Mzl; linetype = tube; radiusexpr = beam.re
      def: Deform "Deformation" | expr = {u, v}; descr = Displacement field
  pg3: PlotGroup2D "Shear Force (beam)" | data = dset1
    line1: Line | expr = beam.Tyl; linetype = tube; radiusexpr = beam.re
      def: Deform "Deformation" | expr = {u, v}; descr = Displacement field
  pg4: PlotGroup2D "Axial Force (beam)" | data = dset1
    line1: Line | expr = beam.Nxl; linetype = tube; radiusexpr = beam.re
      def: Deform "Deformation" | expr = {u, v}; descr = Displacement field